<neuroml xmlns="http://www.neuroml.org/schema/neuroml2"  xmlns:xs="http://www.w3.org/2001/XMLSchema" xmlns:xsi="http://www.w3.org/2001/XMLSchema-instance" xsi:schemaLocation="http://www.neuroml.org/schema/neuroml2 https://raw.github.com/NeuroML/NeuroML2/development/Schemas/NeuroML2/NeuroML_v2beta4.xsd" id="Cell11_deepaxax_10ms">
    <notes>

Network structure (NeuroML 2beta4) for project: Thalamocortical saved with neuroConstruct v1.7.1 on: 16:38:11, 31-May-16

Cell Group: CGdeepaxax contains 1 cells

    </notes>
    <include href="../generatedNeuroML2/DeepAxAx.cell.nml"></include>
    <pulseGenerator id="Input_34" delay="0.0ms" duration="50.0ms" amplitude="3.0E-4uA"/>
    <network id="Cell11_deepaxax_10ms" type="networkWithTemperature" temperature="6.3 degC">
        <population id="CGdeepaxax" component="DeepAxAx" size="1" type="populationList">
            <instance id="0">
                <location x="106.948204000000004" y="16.311178000000002" z="81.75067"/>
            </instance>
        </population>
        <inputList id="Input_34" population="CGdeepaxax" component="Input_34">
            <input id="0" target="../CGdeepaxax/0/DeepAxAx" destination="synapses"/>
        </inputList>
    </network>
</neuroml>
