<neuroml xmlns="http://www.neuroml.org/schema/neuroml2"  xmlns:xs="http://www.w3.org/2001/XMLSchema" xmlns:xsi="http://www.w3.org/2001/XMLSchema-instance" xsi:schemaLocation="http://www.neuroml.org/schema/neuroml2 https://raw.github.com/NeuroML/NeuroML2/development/Schemas/NeuroML2/NeuroML_v2beta4.xsd" id="Cell12_deepLTS_10ms">
    <notes>

Network structure (NeuroML 2beta4) for project: Thalamocortical saved with neuroConstruct v1.7.1 on: 16:51:08, 31-May-16

Cell Group: CGdeepLTS contains 1 cells

    </notes>
    <include href="../generatedNeuroML2/DeepLTSInter.cell.nml"></include>
    <pulseGenerator id="Input_37" delay="0.0ms" duration="50.0ms" amplitude="3.0E-4uA"/>
    <network id="Cell12_deepLTS_10ms" type="networkWithTemperature" temperature="6.3 degC">
        <population id="CGdeepLTS" component="DeepLTSInter" size="1" type="populationList">
            <instance id="0">
                <location x="35.221316999999999" y="17.308599999999998" z="43.615192"/>
            </instance>
        </population>
        <inputList id="Input_37" population="CGdeepLTS" component="Input_37">
            <input id="0" target="../CGdeepLTS/0/DeepLTSInter" destination="synapses"/>
        </inputList>
    </network>
</neuroml>
