<neuroml xmlns="http://www.neuroml.org/schema/neuroml2"  xmlns:xs="http://www.w3.org/2001/XMLSchema" xmlns:xsi="http://www.w3.org/2001/XMLSchema-instance" xsi:schemaLocation="http://www.neuroml.org/schema/neuroml2 https://raw.github.com/NeuroML/NeuroML2/development/Schemas/NeuroML2/NeuroML_v2beta4.xsd" id="Cell14_nRT_FigA8_00">
    <notes>

Network structure (NeuroML 2beta4) for project: Thalamocortical saved with neuroConstruct v1.7.1 on: 20:41:54, 31-May-16

Cell Group: CGnRT contains 1 cells

    </notes>
    <include href="../generatedNeuroML2/nRT.cell.nml"></include>
    <pulseGenerator id="Input_45" delay="0.0ms" duration="50.0ms" amplitude="-4.0E-4uA"/>
    <pulseGenerator id="Input_45a" delay="50.0ms" duration="250.0ms" amplitude="0.0uA"/>
    <network id="Cell14_nRT_FigA8_00" type="networkWithTemperature" temperature="6.3 degC">
        <population id="CGnRT" component="nRT" size="1" type="populationList">
            <instance id="0">
                <location x="0." y="0." z="0."/>
            </instance>
        </population>
        <inputList id="Input_45" population="CGnRT" component="Input_45">
            <input id="0" target="../CGnRT/0/nRT" destination="synapses"/>
        </inputList>
        <inputList id="Input_45a" population="CGnRT" component="Input_45a">
            <input id="0" target="../CGnRT/0/nRT" destination="synapses"/>
        </inputList>
    </network>
</neuroml>
