<neuroml xmlns="http://www.neuroml.org/schema/neuroml2"  xmlns:xs="http://www.w3.org/2001/XMLSchema" xmlns:xsi="http://www.w3.org/2001/XMLSchema-instance" xsi:schemaLocation="http://www.neuroml.org/schema/neuroml2 https://raw.github.com/NeuroML/NeuroML2/development/Schemas/NeuroML2/NeuroML_v2beta4.xsd" id="Cell14_nRT_FigA8_500">
    <notes>

Network structure (NeuroML 2beta4) for project: Thalamocortical saved with neuroConstruct v1.7.1 on: 21:10:21, 31-May-16

Cell Group: CGnRT contains 1 cells

    </notes>
    <include href="../generatedNeuroML2/nRT.cell.nml"></include>
    <pulseGenerator id="Input_45c" delay="200.0ms" duration="250.0ms" amplitude="5.0E-4uA"/>
    <pulseGenerator id="Input_2" delay="0.0ms" duration="200.0ms" amplitude="-4.0E-4uA"/>
    <network id="Cell14_nRT_FigA8_500" type="networkWithTemperature" temperature="6.3 degC">
        <population id="CGnRT" component="nRT" size="1" type="populationList">
            <instance id="0">
                <location x="0." y="0." z="0."/>
            </instance>
        </population>
        <inputList id="Input_45c" population="CGnRT" component="Input_45c">
            <input id="0" target="../CGnRT/0/nRT" destination="synapses"/>
        </inputList>
        <inputList id="Input_2" population="CGnRT" component="Input_2">
            <input id="0" target="../CGnRT/0/nRT" destination="synapses"/>
        </inputList>
    </network>
</neuroml>
