<neuroml xmlns="http://www.neuroml.org/schema/neuroml2"  xmlns:xs="http://www.w3.org/2001/XMLSchema" xmlns:xsi="http://www.w3.org/2001/XMLSchema-instance" xsi:schemaLocation="http://www.neuroml.org/schema/neuroml2 https://raw.github.com/NeuroML/NeuroML2/development/Schemas/NeuroML2/NeuroML_v2beta4.xsd" id="Cell1_supppyrRS_10ms">
    <notes>

Network structure (NeuroML 2beta4) for project: Thalamocortical saved with neuroConstruct v1.7.1 on: 17:17:33, 30-May-16

Cell Group: CGsuppyrRS contains 1 cells

    </notes>
    <include href="../generatedNeuroML2/L23PyrRS.cell.nml"></include>
    <pulseGenerator id="Input_6" delay="0.0ms" duration="50.0ms" amplitude="3.0E-4uA"/>
    <network id="Cell1_supppyrRS_10ms" type="networkWithTemperature" temperature="6.3 degC">
        <population id="CGsuppyrRS" component="L23PyrRS" size="1" type="populationList">
            <instance id="0">
                <location x="80.535089999999997" y="21.833245999999999" z="93.500690000000006"/>
            </instance>
        </population>
        <inputList id="Input_6" population="CGsuppyrRS" component="Input_6">
            <input id="0" target="../CGsuppyrRS/0/L23PyrRS" destination="synapses"/>
        </inputList>
    </network>
</neuroml>
