<neuroml xmlns="http://www.neuroml.org/schema/neuroml2"  xmlns:xs="http://www.w3.org/2001/XMLSchema" xmlns:xsi="http://www.w3.org/2001/XMLSchema-instance" xsi:schemaLocation="http://www.neuroml.org/schema/neuroml2 https://raw.github.com/NeuroML/NeuroML2/development/Schemas/NeuroML2/NeuroML_v2beta4.xsd" id="Cell1_supppyrRS_FIgA1RS">
    <notes>

Network structure (NeuroML 2beta4) for project: Thalamocortical saved with neuroConstruct v1.7.1 on: 20:00:08, 30-May-16

Cell Group: CGsuppyrRS contains 1 cells

    </notes>
    <include href="../generatedNeuroML2/L23PyrRS.cell.nml"></include>
    <pulseGenerator id="Input_8" delay="400.0ms" duration="300.0ms" amplitude="7.5E-4uA"/>
    <pulseGenerator id="Input_7" delay="0.0ms" duration="400.0ms" amplitude="-4.0E-4uA"/>
    <network id="Cell1_supppyrRS_FIgA1RS" type="networkWithTemperature" temperature="6.3 degC">
        <population id="CGsuppyrRS" component="L23PyrRS" size="1" type="populationList">
            <instance id="0">
                <location x="55.112965000000003" y="21.123007000000001" z="94.217560000000006"/>
            </instance>
        </population>
        <inputList id="Input_8" population="CGsuppyrRS" component="Input_8">
            <input id="0" target="../CGsuppyrRS/0/L23PyrRS" destination="synapses"/>
        </inputList>
        <inputList id="Input_7" population="CGsuppyrRS" component="Input_7">
            <input id="0" target="../CGsuppyrRS/0/L23PyrRS" destination="synapses"/>
        </inputList>
    </network>
</neuroml>
