<neuroml xmlns="http://www.neuroml.org/schema/neuroml2"  xmlns:xs="http://www.w3.org/2001/XMLSchema" xmlns:xsi="http://www.w3.org/2001/XMLSchema-instance" xsi:schemaLocation="http://www.neuroml.org/schema/neuroml2 https://raw.github.com/NeuroML/NeuroML2/development/Schemas/NeuroML2/NeuroML_v2beta4.xsd" id="Cell2_suppyrFRB_FigA1FRB">
    <notes>

Network structure (NeuroML 2beta4) for project: Thalamocortical saved with neuroConstruct v1.7.1 on: 20:50:16, 30-May-16

Cell Group: CGsuppyrFRB contains 1 cells

    </notes>
    <include href="../generatedNeuroML2/L23PyrFRB.cell.nml"></include>
    <pulseGenerator id="Input_11" delay="400.0ms" duration="300.0ms" amplitude="4.0E-4uA"/>
    <pulseGenerator id="Input_10" delay="0.0ms" duration="400.0ms" amplitude="-6.0E-4uA"/>
    <network id="Cell2_suppyrFRB_FigA1FRB" type="networkWithTemperature" temperature="6.3 degC">
        <population id="CGsuppyrFRB" component="L23PyrFRB" size="1" type="populationList">
            <instance id="0">
                <location x="111.086394999999996" y="26.998100000000001" z="79.978819999999999"/>
            </instance>
        </population>
        <inputList id="Input_11" population="CGsuppyrFRB" component="Input_11">
            <input id="0" target="../CGsuppyrFRB/0/L23PyrFRB" destination="synapses"/>
        </inputList>
        <inputList id="Input_10" population="CGsuppyrFRB" component="Input_10">
            <input id="0" target="../CGsuppyrFRB/0/L23PyrFRB" destination="synapses"/>
        </inputList>
    </network>
</neuroml>
