<neuroml xmlns="http://www.neuroml.org/schema/neuroml2"  xmlns:xs="http://www.w3.org/2001/XMLSchema" xmlns:xsi="http://www.w3.org/2001/XMLSchema-instance" xsi:schemaLocation="http://www.neuroml.org/schema/neuroml2 https://raw.github.com/NeuroML/NeuroML2/development/Schemas/NeuroML2/NeuroML_v2beta4.xsd" id="Cell3_supbask_10ms">
    <notes>

Network structure (NeuroML 2beta4) for project: Thalamocortical saved with neuroConstruct v1.7.1 on: 21:09:32, 30-May-16

Cell Group: CGsupbask contains 1 cells

    </notes>
    <include href="../generatedNeuroML2/SupBasket.cell.nml"></include>
    <pulseGenerator id="Input_12" delay="0.0ms" duration="50.0ms" amplitude="3.0E-4uA"/>
    <network id="Cell3_supbask_10ms" type="networkWithTemperature" temperature="6.3 degC">
        <population id="CGsupbask" component="SupBasket" size="1" type="populationList">
            <instance id="0">
                <location x="13.144555" y="21.823464999999999" z="74.603390000000005"/>
            </instance>
        </population>
        <inputList id="Input_12" population="CGsupbask" component="Input_12">
            <input id="0" target="../CGsupbask/0/SupBasket" destination="synapses"/>
        </inputList>
    </network>
</neuroml>
