<neuroml xmlns="http://www.neuroml.org/schema/neuroml2"  xmlns:xs="http://www.w3.org/2001/XMLSchema" xmlns:xsi="http://www.w3.org/2001/XMLSchema-instance" xsi:schemaLocation="http://www.neuroml.org/schema/neuroml2 https://raw.github.com/NeuroML/NeuroML2/development/Schemas/NeuroML2/NeuroML_v2beta4.xsd" id="Cell4_supaxax_10ms">
    <notes>

Network structure (NeuroML 2beta4) for project: Thalamocortical saved with neuroConstruct v1.7.1 on: 00:49:54, 31-May-16

Cell Group: CGsupaxax contains 1 cells

    </notes>
    <include href="../generatedNeuroML2/SupAxAx.cell.nml"></include>
    <pulseGenerator id="Input_15" delay="0.0ms" duration="50.0ms" amplitude="3.0E-4uA"/>
    <network id="Cell4_supaxax_10ms" type="networkWithTemperature" temperature="6.3 degC">
        <population id="CGsupaxax" component="SupAxAx" size="1" type="populationList">
            <instance id="0">
                <location x="24.785319999999999" y="18.529734000000001" z="47.675699999999999"/>
            </instance>
        </population>
        <inputList id="Input_15" population="CGsupaxax" component="Input_15">
            <input id="0" target="../CGsupaxax/0/SupAxAx" destination="synapses"/>
        </inputList>
    </network>
</neuroml>
