<neuroml xmlns="http://www.neuroml.org/schema/neuroml2"  xmlns:xs="http://www.w3.org/2001/XMLSchema" xmlns:xsi="http://www.w3.org/2001/XMLSchema-instance" xsi:schemaLocation="http://www.neuroml.org/schema/neuroml2 https://raw.github.com/NeuroML/NeuroML2/development/Schemas/NeuroML2/NeuroML_v2beta4.xsd" id="Cell4_supaxax_FigA2a">
    <notes>

Network structure (NeuroML 2beta4) for project: Thalamocortical saved with neuroConstruct v1.7.1 on: 01:34:04, 31-May-16

Cell Group: CGsupaxax contains 1 cells

    </notes>
    <include href="../generatedNeuroML2/SupAxAx.cell.nml"></include>
    <pulseGenerator id="Input_17" delay="100.0ms" duration="100.0ms" amplitude="4.0E-4uA"/>
    <pulseGenerator id="Input_16" delay="0.0ms" duration="100.0ms" amplitude="-1.0E-4uA"/>
    <network id="Cell4_supaxax_FigA2a" type="networkWithTemperature" temperature="6.3 degC">
        <population id="CGsupaxax" component="SupAxAx" size="1" type="populationList">
            <instance id="0">
                <location x="62.533638000000003" y="21.907302999999999" z="73.355930000000001"/>
            </instance>
        </population>
        <inputList id="Input_17" population="CGsupaxax" component="Input_17">
            <input id="0" target="../CGsupaxax/0/SupAxAx" destination="synapses"/>
        </inputList>
        <inputList id="Input_16" population="CGsupaxax" component="Input_16">
            <input id="0" target="../CGsupaxax/0/SupAxAx" destination="synapses"/>
        </inputList>
    </network>
</neuroml>
