<neuroml xmlns="http://www.neuroml.org/schema/neuroml2"  xmlns:xs="http://www.w3.org/2001/XMLSchema" xmlns:xsi="http://www.w3.org/2001/XMLSchema-instance" xsi:schemaLocation="http://www.neuroml.org/schema/neuroml2 https://raw.github.com/NeuroML/NeuroML2/development/Schemas/NeuroML2/NeuroML_v2beta4.xsd" id="Cell5_supLTS_FigA2b">
    <notes>

Network structure (NeuroML 2beta4) for project: Thalamocortical saved with neuroConstruct v1.7.1 on: 10:48:26, 31-May-16

Cell Group: CGsupLTS contains 1 cells

    </notes>
    <include href="../generatedNeuroML2/SupLTSInter.cell.nml"></include>
    <pulseGenerator id="Input_19a" delay="0.0ms" duration="100.0ms" amplitude="-1.5E-4uA"/>
    <pulseGenerator id="Input_19" delay="100.0ms" duration="100.0ms" amplitude="4.0E-4uA"/>
    <network id="Cell5_supLTS_FigA2b" type="networkWithTemperature" temperature="6.3 degC">
        <population id="CGsupLTS" component="SupLTSInter" size="1" type="populationList">
            <instance id="0">
                <location x="108.192210000000003" y="15.872654000000001" z="22.81504"/>
            </instance>
        </population>
        <inputList id="Input_19a" population="CGsupLTS" component="Input_19a">
            <input id="0" target="../CGsupLTS/0/SupLTSInter" destination="synapses"/>
        </inputList>
        <inputList id="Input_19" population="CGsupLTS" component="Input_19">
            <input id="0" target="../CGsupLTS/0/SupLTSInter" destination="synapses"/>
        </inputList>
    </network>
</neuroml>
