<neuroml xmlns="http://www.neuroml.org/schema/neuroml2"  xmlns:xs="http://www.w3.org/2001/XMLSchema" xmlns:xsi="http://www.w3.org/2001/XMLSchema-instance" xsi:schemaLocation="http://www.neuroml.org/schema/neuroml2 https://raw.github.com/NeuroML/NeuroML2/development/Schemas/NeuroML2/NeuroML_v2beta4.xsd" id="Cell6_spinstell_FigA3_333">
    <notes>

Network structure (NeuroML 2beta4) for project: Thalamocortical saved with neuroConstruct v1.7.1 on: 12:01:55, 31-May-16

Cell Group: CGspinstell contains 1 cells

    </notes>
    <include href="../generatedNeuroML2/L4SpinyStellate.cell.nml"></include>
    <pulseGenerator id="Input_23c" delay="200.0ms" duration="400.0ms" amplitude="3.33E-4uA"/>
    <pulseGenerator id="Input_23" delay="0.0ms" duration="200.0ms" amplitude="-5.0E-5uA"/>
    <network id="Cell6_spinstell_FigA3_333" type="networkWithTemperature" temperature="6.3 degC">
        <population id="CGspinstell" component="L4SpinyStellate" size="1" type="populationList">
            <instance id="0">
                <location x="68.015274000000005" y="13.067069999999999" z="111.996380000000002"/>
            </instance>
        </population>
        <inputList id="Input_23c" population="CGspinstell" component="Input_23c">
            <input id="0" target="../CGspinstell/0/L4SpinyStellate" destination="synapses"/>
        </inputList>
        <inputList id="Input_23" population="CGspinstell" component="Input_23">
            <input id="0" target="../CGspinstell/0/L4SpinyStellate" destination="synapses"/>
        </inputList>
    </network>
</neuroml>
