<neuroml xmlns="http://www.neuroml.org/schema/neuroml2"  xmlns:xs="http://www.w3.org/2001/XMLSchema" xmlns:xsi="http://www.w3.org/2001/XMLSchema-instance" xsi:schemaLocation="http://www.neuroml.org/schema/neuroml2 https://raw.github.com/NeuroML/NeuroML2/development/Schemas/NeuroML2/NeuroML_v2beta4.xsd" id="Cell7_tuftIB_10ms">
    <notes>

Network structure (NeuroML 2beta4) for project: Thalamocortical saved with neuroConstruct v1.7.1 on: 12:14:43, 31-May-16

Cell Group: CGtuftIB contains 1 cells

    </notes>
    <include href="../generatedNeuroML2/L5TuftedPyrIB.cell.nml"></include>
    <pulseGenerator id="Input_24" delay="0.0ms" duration="50.0ms" amplitude="3.0E-4uA"/>
    <network id="Cell7_tuftIB_10ms" type="networkWithTemperature" temperature="6.3 degC">
        <population id="CGtuftIB" component="L5TuftedPyrIB" size="1" type="populationList">
            <instance id="0">
                <location x="91.814589999999995" y="14.595663" z="18.695833"/>
            </instance>
        </population>
        <inputList id="Input_24" population="CGtuftIB" component="Input_24">
            <input id="0" target="../CGtuftIB/0/L5TuftedPyrIB" destination="synapses"/>
        </inputList>
    </network>
</neuroml>
