<neuroml xmlns="http://www.neuroml.org/schema/neuroml2"  xmlns:xs="http://www.w3.org/2001/XMLSchema" xmlns:xsi="http://www.w3.org/2001/XMLSchema-instance" xsi:schemaLocation="http://www.neuroml.org/schema/neuroml2 https://raw.github.com/NeuroML/NeuroML2/development/Schemas/NeuroML2/NeuroML_v2beta4.xsd" id="Cell7_tuftIB_FigA4_1300">
    <notes>

Network structure (NeuroML 2beta4) for project: Thalamocortical saved with neuroConstruct v1.7.1 on: 13:01:50, 31-May-16

Cell Group: CGtuftIB contains 1 cells

    </notes>
    <include href="../generatedNeuroML2/L5TuftedPyrIB.cell.nml"></include>
    <pulseGenerator id="Input_24_1" delay="0.0ms" duration="200.0ms" amplitude="-2.0E-4uA"/>
    <pulseGenerator id="Input_24c" delay="200.0ms" duration="400.0ms" amplitude="0.0013uA"/>
    <network id="Cell7_tuftIB_FigA4_1300" type="networkWithTemperature" temperature="6.3 degC">
        <population id="CGtuftIB" component="L5TuftedPyrIB" size="1" type="populationList">
            <instance id="0">
                <location x="106.978065000000001" y="10.137796" z="83.351410000000001"/>
            </instance>
        </population>
        <inputList id="Input_24_1" population="CGtuftIB" component="Input_24_1">
            <input id="0" target="../CGtuftIB/0/L5TuftedPyrIB" destination="synapses"/>
        </inputList>
        <inputList id="Input_24c" population="CGtuftIB" component="Input_24c">
            <input id="0" target="../CGtuftIB/0/L5TuftedPyrIB" destination="synapses"/>
        </inputList>
    </network>
</neuroml>
