<neuroml xmlns="http://www.neuroml.org/schema/neuroml2"  xmlns:xs="http://www.w3.org/2001/XMLSchema" xmlns:xsi="http://www.w3.org/2001/XMLSchema-instance" xsi:schemaLocation="http://www.neuroml.org/schema/neuroml2 https://raw.github.com/NeuroML/NeuroML2/development/Schemas/NeuroML2/NeuroML_v2beta4.xsd" id="Cell8_tuftRS_10ms">
    <notes>

Network structure (NeuroML 2beta4) for project: Thalamocortical saved with neuroConstruct v1.7.1 on: 13:35:22, 31-May-16

Cell Group: CGtuftRS contains 1 cells

    </notes>
    <include href="../generatedNeuroML2/L5TuftedPyrRS.cell.nml"></include>
    <pulseGenerator id="Input_25" delay="0.0ms" duration="50.0ms" amplitude="3.0E-4uA"/>
    <network id="Cell8_tuftRS_10ms" type="networkWithTemperature" temperature="6.3 degC">
        <population id="CGtuftRS" component="L5TuftedPyrRS" size="1" type="populationList">
            <instance id="0">
                <location x="91.171490000000006" y="15.775786999999999" z="105.967674000000002"/>
            </instance>
        </population>
        <inputList id="Input_25" population="CGtuftRS" component="Input_25">
            <input id="0" target="../CGtuftRS/0/L5TuftedPyrRS" destination="synapses"/>
        </inputList>
    </network>
</neuroml>
