<neuroml xmlns="http://www.neuroml.org/schema/neuroml2"  xmlns:xs="http://www.w3.org/2001/XMLSchema" xmlns:xsi="http://www.w3.org/2001/XMLSchema-instance" xsi:schemaLocation="http://www.neuroml.org/schema/neuroml2 https://raw.github.com/NeuroML/NeuroML2/development/Schemas/NeuroML2/NeuroML_v2beta4.xsd" id="Cell8_tuftRS_Fig5A_1200">
    <notes>

Network structure (NeuroML 2beta4) for project: Thalamocortical saved with neuroConstruct v1.7.1 on: 14:20:12, 31-May-16

Cell Group: CGtuftRS contains 1 cells

    </notes>
    <include href="../generatedNeuroML2/L5TuftedPyrRS.cell.nml"></include>
    <pulseGenerator id="Input_27c" delay="200.0ms" duration="400.0ms" amplitude="0.0012uA"/>
    <pulseGenerator id="Input_27" delay="0.0ms" duration="200.0ms" amplitude="-4.0E-4uA"/>
    <network id="Cell8_tuftRS_Fig5A_1200" type="networkWithTemperature" temperature="6.3 degC">
        <population id="CGtuftRS" component="L5TuftedPyrRS" size="1" type="populationList">
            <instance id="0">
                <location x="40.439587000000003" y="12.409606999999999" z="100.455085999999994"/>
            </instance>
        </population>
        <inputList id="Input_27c" population="CGtuftRS" component="Input_27c">
            <input id="0" target="../CGtuftRS/0/L5TuftedPyrRS" destination="synapses"/>
        </inputList>
        <inputList id="Input_27" population="CGtuftRS" component="Input_27">
            <input id="0" target="../CGtuftRS/0/L5TuftedPyrRS" destination="synapses"/>
        </inputList>
    </network>
</neuroml>
