<neuroml xmlns="http://www.neuroml.org/schema/neuroml2"  xmlns:xs="http://www.w3.org/2001/XMLSchema" xmlns:xsi="http://www.w3.org/2001/XMLSchema-instance" xsi:schemaLocation="http://www.neuroml.org/schema/neuroml2 https://raw.github.com/NeuroML/NeuroML2/development/Schemas/NeuroML2/NeuroML_v2beta4.xsd" id="Cell9_nontuftRS_FigA6_1000">
    <notes>

Network structure (NeuroML 2beta4) for project: Thalamocortical saved with neuroConstruct v1.7.1 on: 16:18:15, 31-May-16

Cell Group: CGnontuftRS contains 1 cells

    </notes>
    <include href="../generatedNeuroML2/L6NonTuftedPyrRS.cell.nml"></include>
    <pulseGenerator id="Input_30" delay="0.0ms" duration="300.0ms" amplitude="-2.5E-4uA"/>
    <pulseGenerator id="Input_30c" delay="300.0ms" duration="400.0ms" amplitude="0.001uA"/>
    <network id="Cell9_nontuftRS_FigA6_1000" type="networkWithTemperature" temperature="6.3 degC">
        <population id="CGnontuftRS" component="L6NonTuftedPyrRS" size="1" type="populationList">
            <instance id="0">
                <location x="95.887694999999994" y="18.784120000000001" z="38.553930000000001"/>
            </instance>
        </population>
        <inputList id="Input_30" population="CGnontuftRS" component="Input_30">
            <input id="0" target="../CGnontuftRS/0/L6NonTuftedPyrRS" destination="synapses"/>
        </inputList>
        <inputList id="Input_30c" population="CGnontuftRS" component="Input_30c">
            <input id="0" target="../CGnontuftRS/0/L6NonTuftedPyrRS" destination="synapses"/>
        </inputList>
    </network>
</neuroml>
