<Lems>

    <!--

        This LEMS file has been automatically generated using PyNeuroML v0.1.12 (libNeuroML v0.2.15)

     -->

    <!-- Specify which component to run -->
    <Target component="Sim_Cell12_deepLTS_FigA2b"/>

    <!-- Include core NeuroML2 ComponentType definitions -->
    <Include file="Cells.xml"/>
    <Include file="Networks.xml"/>
    <Include file="Simulation.xml"/>

    <Include file="Cell12_deepLTS_FigA2b.net.nml"/>
    <Include file="../generatedNeuroML2/DeepLTSInter.cell.nml"/>
    <Include file="ar__m00_25.channel.nml"/>
    <Include file="cad__beta0_02__phi260000.nml"/>
    <Include file="cad__beta0_05__phi520000.nml"/>
    <Include file="cal.channel.nml"/>
    <Include file="cat_a.channel.nml"/>
    <Include file="k2.channel.nml"/>
    <Include file="ka.channel.nml"/>
    <Include file="kahp_slower.channel.nml"/>
    <Include file="kc_fast.channel.nml"/>
    <Include file="kdr_fs.channel.nml"/>
    <Include file="km.channel.nml"/>
    <Include file="naf2__a0__b0__c0__d0__fastNa_shiftmin2_5.channel.nml"/>
    <Include file="nap.channel.nml"/>
    <Include file="pas.channel.nml"/>

    <Simulation id="Sim_Cell12_deepLTS_FigA2b" length="300ms" step="0.025ms" target="Cell12_deepLTS_FigA2b" seed="12345">  <!-- Note seed: ensures same random numbers used every run -->

        <Display id="DispPop__CGdeepLTS" title="Membrane potentials of cells in CGdeepLTS" timeScale="1ms" xmin="-30.0" xmax="330.0" ymin="-90" ymax="50">
            <Line id="CGdeepLTS[0]: v" quantity="CGdeepLTS/0/DeepLTSInter/v" scale="1mV" color="#f7697f" timeScale="1ms"/>
        </Display>

        <OutputFile id="Volts_file__CGdeepLTS" fileName="Sim_Cell12_deepLTS_FigA2b.CGdeepLTS.v.dat">
            <OutputColumn id="v_CGdeepLTS_0_DeepLTSInter_v" quantity="CGdeepLTS/0/DeepLTSInter/v"/>
        </OutputFile>

    </Simulation>

</Lems>
