<Lems>

    <!--

        This LEMS file has been automatically generated using PyNeuroML v0.1.12 (libNeuroML v0.2.15)

     -->

    <!-- Specify which component to run -->
    <Target component="Sim_Cell13_TCR_FigA7_600"/>

    <!-- Include core NeuroML2 ComponentType definitions -->
    <Include file="Cells.xml"/>
    <Include file="Networks.xml"/>
    <Include file="Simulation.xml"/>

    <Include file="Cell13_TCR_FigA7_600.net.nml"/>
    <Include file="../generatedNeuroML2/TCR.cell.nml"/>
    <Include file="ar__m00_25.channel.nml"/>
    <Include file="cad__beta0_02__phi52000.nml"/>
    <Include file="cad__beta0_05__phi104000.nml"/>
    <Include file="cal.channel.nml"/>
    <Include file="cat.channel.nml"/>
    <Include file="k2.channel.nml"/>
    <Include file="ka.channel.nml"/>
    <Include file="kahp_slower.channel.nml"/>
    <Include file="kc.channel.nml"/>
    <Include file="kdr.channel.nml"/>
    <Include file="km.channel.nml"/>
    <Include file="naf_tcr__shift_hnafmin7__shift_mnaf_initmin3__shift_mnaf_runmin2_5.channel.nml"/>
    <Include file="napf_tcr__a0__b0__c0__d0__fastNa_shift7.channel.nml"/>
    <Include file="pas.channel.nml"/>

    <Simulation id="Sim_Cell13_TCR_FigA7_600" length="1500ms" step="0.025ms" target="Cell13_TCR_FigA7_600" seed="12345">  <!-- Note seed: ensures same random numbers used every run -->

        <Display id="DispPop__CGTCR" title="Membrane potentials of cells in CGTCR" timeScale="1ms" xmin="-150.0" xmax="1650.0" ymin="-90" ymax="50">
            <Line id="CGTCR[0]: v" quantity="CGTCR/0/TCR/v" scale="1mV" color="#f7697f" timeScale="1ms"/>
        </Display>

        <OutputFile id="Volts_file__CGTCR" fileName="Sim_Cell13_TCR_FigA7_600.CGTCR.v.dat">
            <OutputColumn id="v_CGTCR_0_TCR_v" quantity="CGTCR/0/TCR/v"/>
        </OutputFile>

    </Simulation>

</Lems>
