<Lems>

    <!--

        This LEMS file has been automatically generated using PyNeuroML v0.1.12 (libNeuroML v0.2.15)

     -->

    <!-- Specify which component to run -->
    <Target component="Sim_Cell14_nRT_FigA8_300"/>

    <!-- Include core NeuroML2 ComponentType definitions -->
    <Include file="Cells.xml"/>
    <Include file="Networks.xml"/>
    <Include file="Simulation.xml"/>

    <Include file="Cell14_nRT_FigA8_300.net.nml"/>
    <Include file="../generatedNeuroML2/nRT.cell.nml"/>
    <Include file="ar__m00.channel.nml"/>
    <Include file="cad__beta0_02__phi10400.nml"/>
    <Include file="cad__beta0_05__phi260000.nml"/>
    <Include file="cal.channel.nml"/>
    <Include file="cat_a.channel.nml"/>
    <Include file="k2.channel.nml"/>
    <Include file="ka.channel.nml"/>
    <Include file="kahp_slower.channel.nml"/>
    <Include file="kc.channel.nml"/>
    <Include file="kdr_fs.channel.nml"/>
    <Include file="km.channel.nml"/>
    <Include file="naf2__a0__b0__c0__d0__fastNa_shift0.channel.nml"/>
    <Include file="napf__a0__b0__c0__d0__fastNa_shift0.channel.nml"/>
    <Include file="pas.channel.nml"/>

    <Simulation id="Sim_Cell14_nRT_FigA8_300" length="450ms" step="0.025ms" target="Cell14_nRT_FigA8_300" seed="12345">  <!-- Note seed: ensures same random numbers used every run -->

        <Display id="DispPop__CGnRT" title="Membrane potentials of cells in CGnRT" timeScale="1ms" xmin="-45.0" xmax="495.0" ymin="-90" ymax="50">
            <Line id="CGnRT[0]: v" quantity="CGnRT/0/nRT/v" scale="1mV" color="#f7697f" timeScale="1ms"/>
        </Display>

        <OutputFile id="Volts_file__CGnRT" fileName="Sim_Cell14_nRT_FigA8_300.CGnRT.v.dat">
            <OutputColumn id="v_CGnRT_0_nRT_v" quantity="CGnRT/0/nRT/v"/>
        </OutputFile>

    </Simulation>

</Lems>
