<Lems>

    <!--

        This LEMS file has been automatically generated using PyNeuroML v0.1.12 (libNeuroML v0.2.15)

     -->

    <!-- Specify which component to run -->
    <Target component="Sim_Cell6_spinstell_FigA3_167"/>

    <!-- Include core NeuroML2 ComponentType definitions -->
    <Include file="Cells.xml"/>
    <Include file="Networks.xml"/>
    <Include file="Simulation.xml"/>

    <Include file="Cell6_spinstell_FigA3_167.net.nml"/>
    <Include file="../generatedNeuroML2/L4SpinyStellate.cell.nml"/>
    <Include file="ar__m00.channel.nml"/>
    <Include file="cad__beta0_02__phi260000.nml"/>
    <Include file="cad__beta0_05__phi260000.nml"/>
    <Include file="cal.channel.nml"/>
    <Include file="cat_a.channel.nml"/>
    <Include file="k2.channel.nml"/>
    <Include file="ka.channel.nml"/>
    <Include file="kahp_slower.channel.nml"/>
    <Include file="kc_fast.channel.nml"/>
    <Include file="kdr_fs.channel.nml"/>
    <Include file="km.channel.nml"/>
    <Include file="naf2__a0__b0__c0__d0__fastNa_shiftmin2_5.channel.nml"/>
    <Include file="napf_spinstell__a0__b0__c0__d0__fastNa_shiftmin2_5.channel.nml"/>
    <Include file="pas.channel.nml"/>

    <Simulation id="Sim_Cell6_spinstell_FigA3_167" length="700ms" step="0.025ms" target="Cell6_spinstell_FigA3_167" seed="12345">  <!-- Note seed: ensures same random numbers used every run -->

        <Display id="DispPop__CGspinstell" title="Membrane potentials of cells in CGspinstell" timeScale="1ms" xmin="-70.0" xmax="770.0" ymin="-90" ymax="50">
            <Line id="CGspinstell[0]: v" quantity="CGspinstell/0/L4SpinyStellate/v" scale="1mV" color="#f7697f" timeScale="1ms"/>
        </Display>

        <OutputFile id="Volts_file__CGspinstell" fileName="Sim_Cell6_spinstell_FigA3_167.CGspinstell.v.dat">
            <OutputColumn id="v_CGspinstell_0_L4SpinyStellate_v" quantity="CGspinstell/0/L4SpinyStellate/v"/>
        </OutputFile>

    </Simulation>

</Lems>
