<Lems>

    <!--

        This LEMS file has been automatically generated using PyNeuroML v0.1.12 (libNeuroML v0.2.15)

     -->

    <!-- Specify which component to run -->
    <Target component="Sim_Cell9_nontuftRS_FigA6_1000"/>

    <!-- Include core NeuroML2 ComponentType definitions -->
    <Include file="Cells.xml"/>
    <Include file="Networks.xml"/>
    <Include file="Simulation.xml"/>

    <Include file="Cell9_nontuftRS_FigA6_1000.net.nml"/>
    <Include file="../generatedNeuroML2/L6NonTuftedPyrRS.cell.nml"/>
    <Include file="ar__m00_25.channel.nml"/>
    <Include file="cad__beta0_01__phi13000.nml"/>
    <Include file="cad__beta0_05__phi65000.nml"/>
    <Include file="cal.channel.nml"/>
    <Include file="cat.channel.nml"/>
    <Include file="k2.channel.nml"/>
    <Include file="ka.channel.nml"/>
    <Include file="kahp_deeppyr.channel.nml"/>
    <Include file="kc.channel.nml"/>
    <Include file="kdr.channel.nml"/>
    <Include file="km.channel.nml"/>
    <Include file="naf__a0__b0__c0__d0__fastNa_shiftmin3_5.channel.nml"/>
    <Include file="nap.channel.nml"/>
    <Include file="pas.channel.nml"/>

    <Simulation id="Sim_Cell9_nontuftRS_FigA6_1000" length="800ms" step="0.025ms" target="Cell9_nontuftRS_FigA6_1000" seed="12345">  <!-- Note seed: ensures same random numbers used every run -->

        <Display id="DispPop__CGnontuftRS" title="Membrane potentials of cells in CGnontuftRS" timeScale="1ms" xmin="-80.0" xmax="880.0" ymin="-90" ymax="50">
            <Line id="CGnontuftRS[0]: v" quantity="CGnontuftRS/0/L6NonTuftedPyrRS/v" scale="1mV" color="#f7697f" timeScale="1ms"/>
        </Display>

        <OutputFile id="Volts_file__CGnontuftRS" fileName="Sim_Cell9_nontuftRS_FigA6_1000.CGnontuftRS.v.dat">
            <OutputColumn id="v_CGnontuftRS_0_L6NonTuftedPyrRS_v" quantity="CGnontuftRS/0/L6NonTuftedPyrRS/v"/>
        </OutputFile>

    </Simulation>

</Lems>
