<neuroml xmlns="http://www.neuroml.org/schema/neuroml2"  xmlns:xs="http://www.w3.org/2001/XMLSchema" xmlns:xsi="http://www.w3.org/2001/XMLSchema-instance" xsi:schemaLocation="http://www.neuroml.org/schema/neuroml2 https://raw.github.com/NeuroML/NeuroML2/development/Schemas/NeuroML2/NeuroML_v2beta4.xsd" id="Test_Cell3_supbask_FigA2a">
    <notes>

Network structure (NeuroML 2beta4) for project: Thalamocortical saved with neuroConstruct v1.7.1 on: 12:46:44, 30-May-16

Cell Group: CGsupbask contains 1 cells

    </notes>
    <include href="../generatedNeuroML2/SupBasket.cell.nml"></include>
    <pulseGenerator id="Input_52" delay="100.0ms" duration="100.0ms" amplitude="4.0E-4uA"/>
    <pulseGenerator id="Input_51" delay="0.0ms" duration="100.0ms" amplitude="-1.0E-4uA"/>
    <network id="Test_Cell3_supbask_FigA2a" type="networkWithTemperature" temperature="6.3 degC">
        <population id="CGsupbask" component="SupBasket" size="1" type="populationList">
            <instance id="0">
                <location x="39.435817999999998" y="21.694942000000001" z="74.098915000000005"/>
            </instance>
        </population>
        <inputList id="Input_52" population="CGsupbask" component="Input_52">
            <input id="0" target="../CGsupbask/0/SupBasket" destination="synapses"/>
        </inputList>
        <inputList id="Input_51" population="CGsupbask" component="Input_51">
            <input id="0" target="../CGsupbask/0/SupBasket" destination="synapses"/>
        </inputList>
    </network>
</neuroml>
