<neuroml xmlns="http://www.neuroml.org/schema/neuroml2"  xmlns:xs="http://www.w3.org/2001/XMLSchema" xmlns:xsi="http://www.w3.org/2001/XMLSchema-instance" xsi:schemaLocation="http://www.neuroml.org/schema/neuroml2 https://raw.github.com/NeuroML/NeuroML2/development/Schemas/NeuroML2/NeuroML_v2beta4.xsd" id="TestTraubDivSpatial">
    <notes>

This NeuroML 2 file was generated by OpenCortex v0.0.5 using:
    libNeuroML v0.2.15
    pyNeuroML v0.1.12

    </notes>
    <property tag="Python random seed" value="1234"/>
    <include href="TestTraubDivSpatial/SupBasket.cell.nml"></include>
    <include href="TestTraubDivSpatial/ar__m00_25.channel.nml"></include>
    <include href="TestTraubDivSpatial/cad__beta0_02__phi260000.nml"></include>
    <include href="TestTraubDivSpatial/cad__beta0_05__phi520000.nml"></include>
    <include href="TestTraubDivSpatial/cal.channel.nml"></include>
    <include href="TestTraubDivSpatial/cat.channel.nml"></include>
    <include href="TestTraubDivSpatial/k2.channel.nml"></include>
    <include href="TestTraubDivSpatial/ka.channel.nml"></include>
    <include href="TestTraubDivSpatial/kahp_slower.channel.nml"></include>
    <include href="TestTraubDivSpatial/kc_fast.channel.nml"></include>
    <include href="TestTraubDivSpatial/kdr_fs.channel.nml"></include>
    <include href="TestTraubDivSpatial/km.channel.nml"></include>
    <include href="TestTraubDivSpatial/naf2__a0__b0__c0__d0__fastNa_shiftmin2_5.channel.nml"></include>
    <include href="TestTraubDivSpatial/nap.channel.nml"></include>
    <include href="TestTraubDivSpatial/pas.channel.nml"></include>
    <include href="TestTraubDivSpatial/L23PyrRS.cell.nml"></include>
    <include href="TestTraubDivSpatial/ar__m00_25.channel.nml"></include>
    <include href="TestTraubDivSpatial/cad__beta0_01__phi26000.nml"></include>
    <include href="TestTraubDivSpatial/cad__beta0_05__phi52000.nml"></include>
    <include href="TestTraubDivSpatial/cal.channel.nml"></include>
    <include href="TestTraubDivSpatial/cat.channel.nml"></include>
    <include href="TestTraubDivSpatial/k2.channel.nml"></include>
    <include href="TestTraubDivSpatial/ka.channel.nml"></include>
    <include href="TestTraubDivSpatial/kahp.channel.nml"></include>
    <include href="TestTraubDivSpatial/kc.channel.nml"></include>
    <include href="TestTraubDivSpatial/kdr.channel.nml"></include>
    <include href="TestTraubDivSpatial/km.channel.nml"></include>
    <include href="TestTraubDivSpatial/naf__a0__b0__c0__d0__fastNa_shiftmin3_5.channel.nml"></include>
    <include href="TestTraubDivSpatial/nap.channel.nml"></include>
    <include href="TestTraubDivSpatial/pas.channel.nml"></include>
    <include href="TestTraubDivSpatial/Syn_AMPA_SupPyr_SupFS.synapse.nml"></include>
    <include href="TestTraubDivSpatial/Syn_NMDA_RSPyr_SupFS.synapse.nml"></include>
    <network id="TestTraubDivSpatial">
        <population id="SupBasket_L23" component="SupBasket" size="90" type="populationList">
            <instance id="0">
                <location x="483.226767845999973" y="-220.366299588000004" z="3.74573502929"/>
            </instance>
            <instance id="1">
                <location x="455.487981224999999" y="-469.634498682000014" z="291.113786528999981"/>
            </instance>
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        </population>
        <population id="L23PyrRS_L23" component="L23PyrRS" size="1000" type="populationList">
            <instance id="0">
                <location x="173.093162253000003" y="-469.809921538000026" z="344.526148471999988"/>
            </instance>
            <instance id="1">
                <location x="189.89337455399999" y="-246.392961506999995" z="26.223782561099998"/>
            </instance>
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        </population>
        <projection id="Proj0syn0_L23PyrRS_L23_SupBasket_L23" presynapticPopulation="L23PyrRS_L23" postsynapticPopulation="SupBasket_L23" synapse="Syn_AMPA_SupPyr_SupFS">
            <connectionWD id="0" preCellId="../L23PyrRS_L23/0/L23PyrRS" postCellId="../SupBasket_L23/21/SupBasket" postSegmentId="60" postFractionAlong="0.225874408061" weight="1." delay="0 ms"/>
            <connectionWD id="1" preCellId="../L23PyrRS_L23/0/L23PyrRS" postCellId="../SupBasket_L23/30/SupBasket" postSegmentId="61" postFractionAlong="0.923546489607" weight="1." delay="0 ms"/>
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        </projection>
        <projection id="Proj0syn1_L23PyrRS_L23_SupBasket_L23" presynapticPopulation="L23PyrRS_L23" postsynapticPopulation="SupBasket_L23" synapse="Syn_NMDA_RSPyr_SupFS">
            <connectionWD id="0" preCellId="../L23PyrRS_L23/0/L23PyrRS" postCellId="../SupBasket_L23/21/SupBasket" postSegmentId="60" postFractionAlong="0.225874408061" weight="0.05" delay="5 ms"/>
            <connectionWD id="1" preCellId="../L23PyrRS_L23/0/L23PyrRS" postCellId="../SupBasket_L23/30/SupBasket" postSegmentId="61" postFractionAlong="0.923546489607" weight="0.05" delay="5 ms"/>
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        </projection>
    </network>
</neuroml>
